*NSET,NSET=ACTUATOR
111
*TRANSFORM, TYPE=R, NSET=ACTUATOR
0.243983,0.014579284,0.98874
**HMORIENT ORIGIN 32.1234,-123.52,234.234
*BOUNDARY
fix,1,6,0.0
ACTUATOR,1,2,0.0
*STEP
#1 APPLY DISPLACEMENT
*DYNAMIC,EXPLICIT
,0.15
*BOUNDARY,AMPLITUDE=RAMP1
ACTUATOR,3,3,3.0
*OUTPUT,HISTORY,VARIABLE=PRESELECT
*NODE OUTPUT, global=NO, nset=ACTUATOR
RF1,RF2,RF3,U1,U2,U3
*MONITOR,DOF=3,NODE=111
*END STEP
